**------------------------------------------------------------------------------
** ABAQUS/Standard performance benchmark S5: Stent expansion
**
**    This benchmark is a strongly nonlinear static analysis that
**    simulates the expansion of a medical stent device. The stent
**    is meshed with hexahedral elements of type C3D8 and uses a linear
**    elastic material model. The expansion tool is modeled using surface
**    elements of type SFM3DR. Contact is defined between the stent and
**    expansion tool. Radial displacements are applied to the expansion
**    tool which in turn cause the stent to expand. The nonlinearity in
**    this problem arises from large displacements and sliding contact.
**
**    Units: lbs, inches, s
**------------------------------------------------------------------------------
*HEADING
S5: Stent expansion
**
** Stent
**
*PART, NAME=Stent
*NODE,NSET=NStent
1,        0.000630,        0.028985,       -0.007920
2,        0.015038,        0.024787,        0.013459
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*TRANSFORM,TYPE=C,NSET=NStent
0.0, 0.0, 0.0, 0.0, 0.0, 1.0
**
*ELEMENT, TYPE=C3D8, ELSET=EStent
1,        16,        15,     18558,       262,       516,     18560,     18557,     18563
2,       516,     18560,     18557,     18563,       515,       517,     18559,       524
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*ORIENTATION,SYSTEM=CYLINDRICAL,NAME=Cyl
0.0, 0.0, 0.0, 0.0, 0.0, 1.0
*SOLID SECTION, ELSET=ESTENT, MATERIAL=SUPER_ELASTIC, ORIENTATION=Cyl
**
*NSET, NSET=ZFix
4808,  6299,  9468,  9471, 10671, 11121, 14327, 14330
*NSET,NSET=CSym1
1148,  1116,  1130,  1332,  1335,  5468
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*NSET,NSET=CSym2
2028,  1637,  1636,  1635,  2027,  5972
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**
*ELSET, ELSET=_SInside_S2, INTERNAL, GENERATE
2,  15488,      2
*SURFACE, TYPE=ELEMENT, NAME=SInside
_SInside_S2, S2
*END PART
**
** Pipe
**
*PART, NAME=Pipe
*NODE, NSET=NPipe
100001,        0.020000,        0.000000,       -0.013250
100002,        0.019917,        0.001819,       -0.013250
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*TRANSFORM, NSET=NPipe, TYPE=C
0.0, 0.0, 0.0,  0.0, 0.0, 1.0
**
*ELEMENT,TYPE=SFM3D4R, ELSET=EPipe
100001,    100001,    100002,    100102,    100101
100002,    100002,    100003,    100103,    100102
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*SURFACE SECTION, ELSET=EPipe
**
*SURFACE, TYPE=ELEMENT, NAME=SOutside
EPipe, SPOS
*END PART
**
** Assembly
**
*ASSEMBLY, NAME=Assembly
*INSTANCE, NAME=Stent, PART=Stent
*END INSTANCE
**
*INSTANCE, NAME=Pipe, PART=Pipe
*END INSTANCE
*END ASSEMBLY
**
** Materials
**
*MATERIAL, NAME=SUPER_ELASTIC
*ELASTIC
6777324., 0.33
*DENSITY
1.0E2,
**
** Boundary conditions
**
*BOUNDARY
Pipe.NPipe, 1,1
Pipe.NPipe, 2,2
Pipe.NPipe, 3,3
Stent.ZFix,  3,3
Stent.CSym1, 2,2
Stent.CSym2, 2,2
**
** Interactions
**
*SURFACE INTERACTION, NAME=Int1
*SURFACE BEHAVIOR, PENALTY
, , 0.01
*CONTACT PAIR, INTERACTION=Int1, TYPE=SURFACE TO SURFACE
Stent.SInside, Pipe.SOutside
**
**------------------------------------------------------------------------------
*STEP, NAME=Step-1, NLGEOM=YES, UNSYMM=YES, INC=100,Convert Sdi=No
Expand stent
*STATIC
0.01, 1.0
**
*BOUNDARY
Pipe.NPipe, 1,1, 0.09
**
** Output requests
**
*OUTPUT, FIELD, NUMBER INTERVAL=10
*NODE OUTPUT
U,
*ELEMENT OUTPUT, ELSET=Stent.EStent
S,
*CONTACT OUTPUT
CSTRESS, CDISP
**
*OUTPUT, HISTORY, FREQ=1
*ENERGY OUTPUT
ALLAE, ALLIE, ALLWK, ALLSD, ETOTAL
**
*PRINT, SOLVE=YES
*END STEP
